// SBML level 2 version 3
// Generated 27-Nov-2014 17:39:48 (GMT+00:59)
// Generated by MathSBML 1203-002
// Generated using Mathematica Version 10.0 for Mac OS X x86 (64-bit) (June 29, 2014)

model transcription_on_srna()
  // Transcriptional switch ON with sRNA
  // This is a Systems Biology Markup Language (SBML) file, generated by MathSBML 1203-002 27-Nov-2014 17:39:47 (GMT+00:59). SBML is a form of XML, and most XML files will not display properly in an internet browser. To view the contents of an XML file use the "Page Source" or equivalent button on you browser.

  // Compartments:
  compartment cell; cell has volume;

  // Species:
  species S in cell = 0;
  species U in cell = 0;
  species X in cell = 0;
  species R in cell = 0;
  species P in cell = 0;
  species W in cell = 0;
  species F in cell = 0;
  species Cshort in cell = 0;
  species Clong in cell = 0;
  species Q in cell = 0;
  species $null in cell;

  // Reactions:
  r1: $null -> S; k1;
    k1 = 0.018;
  r2: S -> U; k2*S;
    k2 = 1;
  r3: U -> R; r3_k3*U;
    r3_k3 = 0.018;
  r4: $null -> X; k4*(Clong + Cshort + R + U);  // modifiers: U, R, Cshort, Clong
    k4 = 0.33;
  r5: X -> P; k5*X;
    k5 = 0.018;
  r6: $null -> W; k12;
    k12 = 0.072;
  r7: W -> F; k22*W;
    k22 = 0.74;
  r8: U -> $null; r8_k9*U;
    r8_k9 = 0.011;
  r9: R -> $null; r9_k9*R;
    r9_k9 = 0.011;
  r10: P -> $null; k11*P;
    k11 = 0.002;
  r11: F -> $null; F*r11_k92;
    r11_k92 = 0.04;
  r12: F + U -> Cshort; F*r12_k30*U;
    r12_k30 = 3;
  r13: F + R -> Clong; F*r13_k30*R;
    r13_k30 = 3;
  r14: Cshort -> Clong; Cshort*r14_k3;
    r14_k3 = 0.018;
  r15: Cshort -> F + U; Cshort*r15_k40;
    r15_k40 = 0.02;
  r16: Clong -> F + R; Clong*r16_k40;
    r16_k40 = 0.02;
  r17: Cshort -> $null; Cshort*r17_k50;
    r17_k50 = 0.05;
  r18: Clong -> $null; Clong*r18_k50;
    r18_k50 = 0.05;
  r19: U -> Q; k73*U;
    k73 = 1;
  r20: Q -> $null; r20_k92*Q;
    r20_k92 = 0.04;
end
